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/batch
! ANSYS input file written by Workbench version 2023 R2
! File used for geometry attach: E:\GitHub_repos\FEA_projects\HW1 (3)\HW1\222_files\dp0\SYS\DM\SYS.scdoc
/title,222--Steady-State Thermal (A5)
/COM,/COM,     ANSYSMotion, 2023.2
/com,--- Data in consistent MKS units. See Solving Units in the help system for more information.
/units,MKS
/prep7
! Turn off shape checking because checks already performed inside WB mesher.
! See help system for more information.
SHPP,OFF,,NOWARN
etcon,set             ! allow ANSYS to choose best KEYOP's for 180x elements, resets any applicable keyopt to MAPDL defaults
/com,*********** Nodes for the whole assembly ***********
nblock,3,,11256
(1i9,3e20.9e3)
        1    -5.407480119E-02     3.868337422E-02     1.315165043E-01
        2    -5.825530965E-02     3.693297044E-02     1.315165043E-01
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-1
/com,*********** Elements for Body 1 "SYS\Solid" ***********
et,1,279
eblock,19,solid,,754
(19i9)
        1        1        1        1        0        0        0        0       20        0        1        1        2      164      163       52       51      193      192
     1405     1412     1928     1408     1582     1583     2005     1585     1407     1411     1932     1929
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-1
/com,*********** Elements for Body 2 "SYS\Solid" ***********
et,2,279
eblock,19,solid,,816
(19i9)
        2        2        2        2        0        0        0        0       20        0      755     5078     5167     5168     5079     5113     5253     5252     5114
     6868     7118     6871     6866     6958     7291     6961     6957     6867     7120     7123     6870
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-1
/com,*********** Send User Defined Coordinate System(s) ***********
csys,0
toffst,273.15,  ! Temperature offset from absolute zero
/com,*********** Send Materials ***********
Temperature = 'TEMP' ! Temperature
MP,DENS,1,7200,	! kg m^-3
MP,ALPX,1,1.1e-05,	! C^-1
MP,C,1,447,	! J kg^-1 C^-1
MP,KXX,1,52,	! W m^-1 C^-1
MP,RSVX,1,9.6e-08,	! kg m^3 A^-2 s^-3
MP,EX,1,110000000000,	! Pa
MP,NUXY,1,0.28,
MP,MURX,1,10000,

MP,KXX,2,0.2,	! W m^-1 C^-1

!************************* Model Summary ********************
!SYS\Solid,	Gray Cast Iron,	matid,	1
!SYS\Solid,	Foam Insulation,	matid,	2
!************************* End Model Summary ********************
/com,*********** Create Contact "Contact Region" ***********
*set,tid,4
*set,cid,3
r,tid
r,cid
et,tid,170
et,cid,174
eblock,10,,,728
(15i9)
     4437        4        4        4        0      296      298      299      215     2260     2265     2071     2070
     4438        4        4        4        0      269      301      302      297     2207     2269     2262     2206
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-1
eblock,10,,,728
(15i9)
     5165        3        3        3        0      296      298      299      215     2260     2265     2071     2070
     5166        3        3        3        0      269      301      302      297     2207     2269     2262     2206
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-1
eblock,10,,,672
(15i9)
     5893        3        4        3        0     5058     5088     5087     5085     6803     6896     6889     6802
     5894        3        4        3        0     5086     5091     5090     5004     6892     6903     6601     6600
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-1
eblock,10,,,672
(15i9)
     6565        4        3        4        0     5058     5088     5087     5085     6803     6896     6889     6802
     6566        4        3        4        0     5086     5091     5090     5004     6892     6903     6601     6600
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-1
keyo,cid,8,2               ! auto create asymmetric contact (from Program Controlled setting)
keyo,cid,10,0              ! adjust contact stiffness each NR iteration (from Program Controlled setting)
keyo,cid,12,5              ! bonded always
keyo,cid,18,1              ! small sliding turned on by application
keyo,cid,2,0               ! augmented Lagrange (from Program Controlled setting)
keyo,cid,4,0               ! on Gauss point (from Program Controlled setting)
keyo,cid,9,1               ! ignore initial gaps/penetration
keyo,cid,7,0               ! No Prediction
rmod,tid,3,10.      ! FKN
rmod,tid,5,0.       ! ICONT
rmod,tid,6,0.       ! PINB
rmod,tid,10,0.      ! CNOF
rmod,tid,12,0.      ! FKT
rmod,tid,36,32      ! WB DSID
rmod,cid,3,10.      ! FKN
rmod,cid,5,0.       ! ICONT
rmod,cid,6,0.       ! PINB
rmod,cid,10,0.      ! CNOF
rmod,cid,12,0.      ! FKT
rmod,cid,36,32      ! WB DSID
*set,_maxkxx,520000.
rmod,cid,14,_maxkxx/_ASMDIAG         ! TCC, Divide by Length since Traction Based
rmod,tid,14,_maxkxx/_ASMDIAG      ! TCC, Divide by Length since Traction Based
keyo,cid,1,2     ! Pure thermal contact
nsel,all
esel,all
fcum,add                   ! add nodal forces up (needed in case have loads on the same edge,vertex)
fcum                       ! reset default on fcum command since done sending WB F loads
/com,*********** Create "Convection" ***********
et,5,152
eblock,10,,,768
(15i9)
     7237        5        5        5        0     6234     6233     6441     6348     9771     9772    10076     9774
     7238        5        5        5        0     6410     6443     4944     4974    10201     6447     6445     6539
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-1
esel,s,type,,5
keyop,5,8,2.
keyop,5,13,0
*DIM,_loadvari51,TABLE,2,1,1,TIME,
! Time values
_loadvari51(1,0,1) = 0.
_loadvari51(2,0,1) = 1.
! Load values
_loadvari51(1,1,1) = 20.
_loadvari51(2,1,1) = 20.

/com,*********** Create "Convection 2" ***********
et,6,152
eblock,10,,,572
(15i9)
     8005        6        6        6        0     1297     1318      982     1002     4753     4048     4046     4111
     8006        6        6        6        0       83      103     1320     1255     1675     1716     4618     1676
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-1
esel,s,type,,6
keyop,6,8,2.
keyop,6,13,0
*DIM,_loadvari53,TABLE,1,1,1,TIME,
! Time values
_loadvari53(1,0,1) = 0.
! Load values
_loadvari53(1,1,1) = 155.

esel,all
/com,***************** Define Uniform Initial temperature ***************
tunif,22.
fini
/com,****************************************************************************
/com,*************************    SOLUTION       ********************************
/com,****************************************************************************
/solu
antype,0                   ! static analysis
!eqsl,sparse               ! using sparse solver which is default so no eqsl command needed
cntr,print,1               ! print out contact info and also make no initial contact an error
cncheck,dmp		!	Enable program controlled contact splitting for distributed memory parallel run
rescontrol,,none                 ! Do not keep any restart files
dmpoption,emat,no             ! Don't combine emat file for DANSYS
dmpoption,esav,no             ! Don't combine esav file for DANSYS
/com,****************************************************
/com,******************* SOLVE FOR LS 1 OF 1 ****************
esel,s,type,,5
nsle
sf,all,conv,3.8,%_loadvari51%
esel,s,type,,6
nsle
sf,all,conv,20.,%_loadvari53%
nsel,all
esel,all
autots,on
nsub,1,10,1
time,1.
outres,erase
outres,all,none
outres,nsol,all
outres,rsol,all
outres,eangl,all
outres,veng,all
outres,fflux,all
outres,cont,all
esel,s,type,,5
esel,a,type,,6
cm,_elmisc,elem
esel,all
outres,misc,all,_elmisc
cnvtol,heat,,.001,,1.e-006    ! Program Controlled. Set MINREF equivalent of 1e-6 Watts
! *********** WB SOLVE COMMAND ***********
! check interactive state
*get,ANSINTER_,active,,int
*if,ANSINTER_,ne,0,then
/eof
*endif
solve
/com *************** Write FE CONNECTORS *********
CEWRITE,file,ce,,INTE
/com,****************************************************
/com,*************** FINISHED SOLVE FOR LS 1 *************
/post1
fini
