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/batch
! ANSYS input file written by Workbench version 2023 R2
! File used for geometry attach: E:\GitHub_repos\FEA_projects\HW2\elbow.scdoc
/title,HW2--Steady-State Thermal (C5)
/COM,/COM,     ANSYSMotion, 2023.2
/com,--- Data in consistent MKS units. See Solving Units in the help system for more information.
/units,MKS
/prep7
! Turn off shape checking because checks already performed inside WB mesher.
! See help system for more information.
SHPP,OFF,,NOWARN
etcon,set             ! allow ANSYS to choose best KEYOP's for 180x elements, resets any applicable keyopt to MAPDL defaults
/com,*********** Nodes for the whole assembly ***********
nblock,3,,7103
(1i9,3e20.9e3)
        1    -3.358225408E-02    -9.860639489E-03     2.000000000E-01
        2    -2.944387365E-02    -1.892242861E-02     2.000000000E-01
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-1
/com,*********** Elements for Body 1 "elbow\Solid" ***********
et,1,279
eblock,19,solid,,1020
(19i9)
        1        1        1        1        0        0        0        0       20        0        1     1486     1551     1552     1487     1513     1816     1817     1512
     5806     5958     5809     5804     5867     6455     5865     5864     5805     5960     5963     5808
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-1
/com,*********** Send User Defined Coordinate System(s) ***********
csys,0
toffst,273.15,  ! Temperature offset from absolute zero
/com,*********** Send Materials ***********
Temperature = 'TEMP' ! Temperature
MP,DENS,1,7200,	! kg m^-3
MP,ALPX,1,1.1e-05,	! C^-1
MP,C,1,447,	! J kg^-1 C^-1
MPTEMP,,,,,,,,
MPTEMP,1,20
MPTEMP,2,100
MPTEMP,3,200
MPTEMP,4,300
MPTEMP,5,400
MPTEMP,6,500
MPDATA,KXX,1, ,51.6,50.8,49.8,48.8,47.8,46.8,	! W m^-1 C^-1
MPTEMP,,,,,,,,
MP,RSVX,1,9.6e-08,	! kg m^3 A^-2 s^-3
MP,EX,1,110000000000,	! Pa
MP,NUXY,1,0.28,
MP,MURX,1,10000,

!************************* Model Summary ********************
!elbow\Solid,	Gray Cast Iron,	matid,	1
!************************* End Model Summary ********************
fcum,add                   ! add nodal forces up (needed in case have loads on the same edge,vertex)
fcum                       ! reset default on fcum command since done sending WB F loads
/com,*********** Create "Convection" ***********
et,2,152
eblock,10,,,748
(15i9)
     2849        2        2        2        0      674      696       21        1     3620     1892     1822     1824
     2850        2        2        2        0      695      708      707      443     3641     3655     3128     3127
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-1
esel,s,type,,2
keyop,2,8,2.
keyop,2,13,0
/com,*********** Create "Convection 2" ***********
et,3,152
eblock,10,,,1020
(15i9)
     3597        3        3        3        0       51       23      402       53     1896     1897     1957     1953
     3598        3        3        3        0      372      413      414      401     2925     3037     3011     2924
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-1
esel,s,type,,3
keyop,3,8,2.
keyop,3,13,0
esel,all
/com,***************** Define Uniform Initial temperature ***************
tunif,22.
fini
/com,****************************************************************************
/com,*************************    SOLUTION       ********************************
/com,****************************************************************************
/solu
antype,0                   ! static analysis
!eqsl,sparse               ! using sparse solver which is default so no eqsl command needed
cntr,print,1               ! print out contact info and also make no initial contact an error
cncheck,dmp		!	Enable program controlled contact splitting for distributed memory parallel run
rescontrol,,none                 ! Do not keep any restart files
dmpoption,emat,no             ! Don't combine emat file for DANSYS
dmpoption,esav,no             ! Don't combine esav file for DANSYS
/com,****************************************************
/com,******************* SOLVE FOR LS 1 OF 1 ****************
esel,s,type,,2
nsle
sf,all,conv,20.,150.
esel,s,type,,3
nsle
sf,all,conv,3.7,20.
nsel,all
esel,all
autots,on
nsub,1,10,1
time,1.
outres,erase
outres,all,none
outres,nsol,all
outres,rsol,all
outres,eangl,all
outres,veng,all
outres,fflux,all
outres,cont,all
esel,s,type,,2
esel,a,type,,3
cm,_elmisc,elem
esel,all
outres,misc,all,_elmisc
cnvtol,heat,,.001,,1.e-006    ! Program Controlled. Set MINREF equivalent of 1e-6 Watts
! *********** WB SOLVE COMMAND ***********
! check interactive state
*get,ANSINTER_,active,,int
*if,ANSINTER_,ne,0,then
/eof
*endif
solve
/com *************** Write FE CONNECTORS *********
CEWRITE,file,ce,,INTE
/com,****************************************************
/com,*************** FINISHED SOLVE FOR LS 1 *************
/post1
fini
