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/batch
! ANSYS input file written by Workbench version 2023 R2
! File used for geometry attach: E:\GitHub_repos\FEA_projects\HW5\hw5_files (2)\hw5_files\hw5_files\dp0\SYS\DM\SYS.scdoc
/title,hw5--Static Structural (A5)
/COM,/COM,     ANSYSMotion, 2023.2
/com,--- Data in consistent MKS units. See Solving Units in the help system for more information.
/units,MKS
/prep7
! Turn off shape checking because checks already performed inside WB mesher.
! See help system for more information.
SHPP,OFF,,NOWARN
etcon,set             ! allow ANSYS to choose best KEYOP's for 180x elements, resets any applicable keyopt to MAPDL defaults
/com,*********** Nodes for the whole assembly ***********
nblock,3,,623
(1i9,3e20.9e3)
        1     1.764488054E+01    -6.565108946E-01    -2.961965740E+00
        2     1.764488054E+01    -3.670825958E-01    -2.961965740E+00
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-1
/com,*********** Elements for Body 1 "Beam (large)" ***********
et,1,188
keyo,1,3,2
eblock,19,solid,,146
(19i9)
        1        1        1        1        0        0        0        0        3        0        1        1        4      251
        1        1        1        1        0        0        0        0        3        0        2        4        5      252
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-1
/com,*********** Elements for Body 2 "Beam (small)" ***********
et,2,188
keyo,2,3,2
eblock,19,solid,,2
(19i9)
        2        2        2        2        0        0        0        0        3        0      311       61      115      561
        2        2        2        2        0        0        0        0        3        0      312       61       63      562
-1
/com,*********** Elements for Body 3 "Beam (small)" ***********
et,3,188
keyo,3,3,2
eblock,19,solid,,2
(19i9)
        3        3        3        3        0        0        0        0        3        0      313       21       37      563
        3        3        3        3        0        0        0        0        3        0      314       37       33      564
-1
/com,*********** Elements for Body 4 "Beam (small)" ***********
et,4,188
keyo,4,3,2
eblock,19,solid,,3
(19i9)
        4        4        4        4        0        0        0        0        3        0      315       10       11      565
        4        4        4        4        0        0        0        0        3        0      316       11      250      566
        4        4        4        4        0        0        0        0        3        0      317      250       66      567
-1
/com,*********** Elements for Body 5 "Beam (small)" ***********
et,5,188
keyo,5,3,2
eblock,19,solid,,164
(19i9)
        5        5        5        5        0        0        0        0        3        0      147        1        2      397
        5        5        5        5        0        0        0        0        3        0      148        6        1      398
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-1
/com,*********** Send User Defined Coordinate System(s) ***********
csys,0
toffst,273.15,  ! Temperature offset from absolute zero
/com,*********** Set Reference Temperature ***********
tref,22.
/com,*********** Send Materials ***********
Temperature = 'TEMP' ! Temperature
MP,DENS,1,7850,	! kg m^-3
MP,ALPX,1,1.2e-05,	! C^-1
MP,C,1,434,	! J kg^-1 C^-1
MP,KXX,1,60.5,	! W m^-1 C^-1
MP,RSVX,1,1.7e-07,	! kg m^3 A^-2 s^-3
MP,EX,1,200000000000,	! Pa
MP,NUXY,1,0.3,
MP,MURX,1,10000,

Temperature = 'TEMP' ! Temperature
MP,DENS,2,7850,	! kg m^-3
MP,ALPX,2,1.2e-05,	! C^-1
MP,C,2,434,	! J kg^-1 C^-1
MP,KXX,2,60.5,	! W m^-1 C^-1
MP,RSVX,2,1.7e-07,	! kg m^3 A^-2 s^-3
MP,EX,2,200000000000,	! Pa
MP,NUXY,2,0.3,
MP,MURX,2,10000,

Temperature = 'TEMP' ! Temperature
MP,DENS,3,7850,	! kg m^-3
MP,ALPX,3,1.2e-05,	! C^-1
MP,C,3,434,	! J kg^-1 C^-1
MP,KXX,3,60.5,	! W m^-1 C^-1
MP,RSVX,3,1.7e-07,	! kg m^3 A^-2 s^-3
MP,EX,3,200000000000,	! Pa
MP,NUXY,3,0.3,
MP,MURX,3,10000,

Temperature = 'TEMP' ! Temperature
MP,DENS,4,7850,	! kg m^-3
MP,ALPX,4,1.2e-05,	! C^-1
MP,C,4,434,	! J kg^-1 C^-1
MP,KXX,4,60.5,	! W m^-1 C^-1
MP,RSVX,4,1.7e-07,	! kg m^3 A^-2 s^-3
MP,EX,4,200000000000,	! Pa
MP,NUXY,4,0.3,
MP,MURX,4,10000,

Temperature = 'TEMP' ! Temperature
MP,DENS,5,7850,	! kg m^-3
MP,ALPX,5,1.2e-05,	! C^-1
MP,C,5,434,	! J kg^-1 C^-1
MP,KXX,5,60.5,	! W m^-1 C^-1
MP,RSVX,5,1.7e-07,	! kg m^3 A^-2 s^-3
MP,EX,5,200000000000,	! Pa
MP,NUXY,5,0.3,
MP,MURX,5,10000,

/com,*********** Send Beam Properties ***********
SECTYPE,1,BEAM,HREC
SECDATA,0.150000000000001,0.150000000000001,4.4e-003,4.40000000000002e-003,4.4e-003,4.40000000000002e-003
secoffset,cent

SECTYPE,2,BEAM,HREC
SECDATA,5.49999999999999e-002,5.49999999999999e-002,3.00000000000001e-003,3.00000000000002e-003,3.e-003,3.00000000000003e-003
secoffset,cent

SECTYPE,3,BEAM,HREC
SECDATA,5.49999999999999e-002,5.49999999999999e-002,3.00000000000001e-003,3.00000000000002e-003,3.e-003,3.00000000000003e-003
secoffset,cent

SECTYPE,4,BEAM,HREC
SECDATA,5.49999999999999e-002,5.49999999999999e-002,3.00000000000001e-003,3.00000000000002e-003,3.e-003,3.00000000000003e-003
secoffset,cent

SECTYPE,5,BEAM,HREC
SECDATA,5.49999999999999e-002,5.49999999999999e-002,3.00000000000001e-003,3.00000000000002e-003,3.e-003,3.00000000000003e-003
secoffset,cent

!************************* Model Summary ********************
!Beam (large),	Structural Steel,	matid,	1
!Beam (small),	Structural Steel,	matid,	2
!Beam (small),	Structural Steel,	matid,	3
!Beam (small),	Structural Steel,	matid,	4
!Beam (small),	Structural Steel,	matid,	5
!************************* End Model Summary ********************
CMBLOCK,_CM451_FIXEDSU,NODE,       16
(8i10)
        77        82        87        88        89        90        91        92
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
/com,*********** Fixed Supports ***********
CMBLOCK,_FIXEDSU,NODE,       16
(8i10)
        77        82        87        88        89        90        91        92
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
cmsel,s,_FIXEDSU
d,all,all
nsel,all
/com,*********** Define Force Using Surface Effect Elements ***********
local,12,0,0.,0.,0.,0.,0.,0.
csys,0
et,6,156
mat,6
keyop,6,5,1         !  No orientation node
eblock,10,,,7
(15i9)
      318        6        6        6       12       62       61
      319        6        6        6       12       61       60
      320        6        6        6       12       60       59
      321        6        6        6       12       59       35
      322        6        6        6       12       35       36
      323        6        6        6       12       36       37
      324        6        6        6       12       37       23
-1
esel,s,type,,6
keyop,6,2,1                ! Apply load in local coordinate system
keyop,6,7,1                ! Use original area so load is constant in large deformation
esel,all
/com,*********** Define Force Using Surface Effect Elements ***********
local,13,0,0.,0.,0.,0.,0.,0.
csys,0
et,7,156
mat,7
keyop,7,5,1         !  No orientation node
eblock,10,,,7
(15i9)
      325        7        7        7       13       62       61
      326        7        7        7       13       61       60
      327        7        7        7       13       60       59
      328        7        7        7       13       59       35
      329        7        7        7       13       35       36
      330        7        7        7       13       36       37
      331        7        7        7       13       37       23
-1
esel,s,type,,7
keyop,7,2,1                ! Apply load in local coordinate system
keyop,7,7,1                ! Use original area so load is constant in large deformation
esel,all
fini
/com,****************************************************************************
/com,*************************    SOLUTION       ********************************
/com,****************************************************************************
/solu
antype,0                   ! static analysis
_thickRatio=  0     ! Ratio of thick parts in the model
eqsl,sparse,,,,,1
cntr,print,1               ! print out contact info and also make no initial contact an error
nldiag,cont,iter           ! print out contact info each equilibrium iteration
rescontrol,linear,last           ! Turn on restart files due to future eigen analysis intent
/com,****************************************************
/com,******************* SOLVE FOR LS 1 OF 1 ****************
esel,s,type,,6
nsle
sfe,all,1,pres,1,-123010.689766873
sfe,all,2,pres,1,0.
sfe,all,3,pres,1,0.
esel,s,type,,7
nsle
sfe,all,1,pres,1,0.
sfe,all,2,pres,1,0.
sfe,all,3,pres,1,-3134.82899507832
nsel,all
esel,all
nsub,1,1,1
time,1.
outres,erase
outres,all,none
outres,nsol,all,
outres,rsol,all
outres,eangl,all
outres,etmp,all
outres,veng,all
outres,strs,all,
outres,epel,all,
outres,eppl,all,
outres,cont,all,
esel,s,type,,1
esel,a,type,,2,5
cm,_elmisc,elem
esel,all
outres,misc,all,_elmisc
! *********** WB SOLVE COMMAND ***********
! check interactive state
*get,ANSINTER_,active,,int
*if,ANSINTER_,ne,0,then
/eof
*endif
solve
/com *************** Write FE CONNECTORS *********
CEWRITE,file,ce,,INTE
/com,****************************************************
/com,*************** FINISHED SOLVE FOR LS 1 *************
*get,_NSOLTHREADS,active,0,ntfs
*get,_NSOLPROCESSES,active,0,npfs
/post1
fini
