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/batch
! ANSYS input file written by Workbench version 2023 R2
! File used for geometry attach: E:\GitHub_repos\FEA_projects\HW6\Hw6_files\dp0\SYS\DM\SYS.scdoc
/title,Hw6--Static Structural (A5)
/COM,/COM,     ANSYSMotion, 2023.2
/com,--- Data in consistent MKS units. See Solving Units in the help system for more information.
/units,MKS
/prep7
! Turn off shape checking because checks already performed inside WB mesher.
! See help system for more information.
SHPP,OFF,,NOWARN
etcon,set             ! allow ANSYS to choose best KEYOP's for 180x elements, resets any applicable keyopt to MAPDL defaults
/com,*********** Nodes for the whole assembly ***********
nblock,3,,13429
(1i9,3e20.9e3)
        1     9.078089500E-02     2.100522038E-01     9.090909091E-04
        2     9.078089500E-02     2.100522038E-01    -8.181818182E-03
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-1
/com,*********** Elements for Body 1 "HW6_obj\Solid" ***********
et,1,187
eblock,19,solid,,5972
(19i9)
        1        1        1        1        0        0        0        0       10        0      961     3649     3080     3797     3323     8017     7950     5491     6713
     4096     6711
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-1
/com,*********** Elements for Body 2 "HW6_obj\Solid" ***********
et,2,186
keyo,2,2,1          ! set full integration on SOLID186
eblock,19,solid,,110
(19i9)
        2        2        2        2        0        0        0        0       20        0        1        1       21       51       31       66       64       61       63
      195      287      327      196      418      410      409      415      197      288      389      328
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-1
/com,*********** Elements for Body 3 "HW6_obj\Solid" ***********
et,3,186
keyo,3,2,1          ! set full integration on SOLID186
eblock,19,solid,,110
(19i9)
        3        3        3        3        0        0        0        0       20        0      111      669      689      719      699      734      732      729      731
      863      955      995      864     1086     1078     1077     1083      865      956     1057      996
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-1
/com,*********** Elements for Body 4 "HW6_obj\Solid" ***********
et,4,186
keyo,4,2,1          ! set full integration on SOLID186
eblock,19,solid,,110
(19i9)
        4        4        4        4        0        0        0        0       20        0      221     1337     1357     1377     1367     1402     1400     1398     1399
     1531     1622     1663     1532     1754     1749     1748     1751     1533     1624     1704     1664
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-1
/com,*********** Elements for Body 5 "HW6_obj\Solid" ***********
et,5,186
keyo,5,2,1          ! set full integration on SOLID186
eblock,19,solid,,110
(19i9)
        5        5        5        5        0        0        0        0       20        0      331     2005     2025     2045     2035     2070     2068     2066     2067
     2199     2290     2331     2200     2422     2417     2416     2419     2201     2292     2372     2332
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-1
/com,*********** Send User Defined Coordinate System(s) ***********
csys,0
toffst,273.15,  ! Temperature offset from absolute zero
/com,*********** Set Reference Temperature ***********
tref,22.
/com,*********** Send Materials ***********

TB,PLAS,1,1,,BKIN
TBDATA,1,220000000,9000000000
MP,EX,1,67000000000,	! Pa
MP,NUXY,1,0.33,

MP,EX,2,205000000000,	! Pa
MP,NUXY,2,0.29,

MP,EX,3,205000000000,	! Pa
MP,NUXY,3,0.29,

MP,EX,4,205000000000,	! Pa
MP,NUXY,4,0.29,

MP,EX,5,205000000000,	! Pa
MP,NUXY,5,0.29,

!************************* Model Summary ********************
!HW6_obj\Solid,	new soft alloy,	matid,	1
!HW6_obj\Solid,	machine steel,	matid,	2
!HW6_obj\Solid,	machine steel,	matid,	3
!HW6_obj\Solid,	machine steel,	matid,	4
!HW6_obj\Solid,	machine steel,	matid,	5
!************************* End Model Summary ********************
/com,*********** Create Contact "Frictional - HW6_obj\Solid To HW6_obj\Solid" ***********
*set,tid,7
*set,cid,6
r,tid
r,cid
et,tid,170
et,cid,174
eblock,10,,,66
(15i9)
     8373        7        7        7        0      117      138      192      116      536      577      534      533
     8374        7        7        7        0      118      143      138      117      538      576      536      535
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-1
eblock,10,,,66
(15i9)
     8439        6        6        6        0      117      138      192      116      536      577      534      533
     8440        6        6        6        0      118      143      138      117      538      576      536      535
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-1
eblock,10,,,156
(15i9)
     8505        6        7        6        0     4018     3861     3853     3853    11817    11062     3853    11816
     8506        6        7        6        0     3973     3854     3951     3951    11619    11517     3951    11621
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-1
eblock,10,,,156
(15i9)
     8661        7        6        7        0     4018     3861     3853     3853    11817    11062     3853    11816
     8662        7        6        7        0     3973     3854     3951     3951    11619    11517     3951    11621
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-1
keyo,cid,8,2               ! auto create asymmetric contact (from Program Controlled setting)
keyo,cid,10,0              ! adjust contact stiffness each NR iteration (from Program Controlled setting)
keyo,cid,12,0              ! standard contact
mp,mu,cid,0.15      ! unitless
keyo,cid,2,0               ! augmented Lagrange (from Program Controlled setting)
keyo,cid,4,0               ! on Gauss point (from Program Controlled setting)
keyo,cid,9,0               ! use real geometry with stepped effects
keyo,cid,7,0               ! No Prediction
rmod,tid,3,1.       ! FKN
rmod,tid,5,0.       ! ICONT
rmod,tid,6,0.       ! PINB
rmod,tid,10,0.      ! CNOF
rmod,tid,12,0.      ! FKT
rmod,tid,36,69      ! WB DSID
rmod,cid,3,1.       ! FKN
rmod,cid,5,0.       ! ICONT
rmod,cid,6,0.       ! PINB
rmod,cid,10,0.      ! CNOF
rmod,cid,12,0.      ! FKT
rmod,cid,36,69      ! WB DSID
/com,*********** Create Contact "Frictional - HW6_obj\Solid To HW6_obj\Solid" ***********
*set,tid,9
*set,cid,8
r,tid
r,cid
et,tid,170
et,cid,174
eblock,10,,,66
(15i9)
     8817        9        9        9        0     1473     1474     1409     1414     1910     1777     1776     1787
     8818        9        9        9        0     1472     1479     1474     1473     1909     1912     1910     1908
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-1
eblock,10,,,66
(15i9)
     8883        8        8        8        0     1473     1474     1409     1414     1910     1777     1776     1787
     8884        8        8        8        0     1472     1479     1474     1473     1909     1912     1910     1908
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-1
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eblock,10,,,156
(15i9)
     9105        9        8        9        0     4018     3861     3853     3853    11817    11062     3853    11816
     9106        9        8        9        0     3973     3854     3951     3951    11619    11517     3951    11621
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-1
keyo,cid,8,2               ! auto create asymmetric contact (from Program Controlled setting)
keyo,cid,10,0              ! adjust contact stiffness each NR iteration (from Program Controlled setting)
keyo,cid,12,0              ! standard contact
mp,mu,cid,0.15      ! unitless
keyo,cid,2,0               ! augmented Lagrange (from Program Controlled setting)
keyo,cid,4,0               ! on Gauss point (from Program Controlled setting)
keyo,cid,9,0               ! use real geometry with stepped effects
keyo,cid,7,0               ! No Prediction
rmod,tid,3,1.       ! FKN
rmod,tid,5,0.       ! ICONT
rmod,tid,6,0.       ! PINB
rmod,tid,10,0.      ! CNOF
rmod,tid,12,0.      ! FKT
rmod,tid,36,72      ! WB DSID
rmod,cid,3,1.       ! FKN
rmod,cid,5,0.       ! ICONT
rmod,cid,6,0.       ! PINB
rmod,cid,10,0.      ! CNOF
rmod,cid,12,0.      ! FKT
rmod,cid,36,72      ! WB DSID
/com,*********** Create Contact "Frictional - HW6_obj\Solid To HW6_obj\Solid" ***********
*set,tid,11
*set,cid,10
r,tid
r,cid
et,tid,170
et,cid,174
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eblock,10,,,56
(15i9)
     9449       11       10       11        0     3981     3833     3980     3980    11655    11651     3980    11659
     9450       11       10       11        0     3981     3838     3833     3833    11656    10946     3833    11655
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-1
keyo,cid,8,2               ! auto create asymmetric contact (from Program Controlled setting)
keyo,cid,10,0              ! adjust contact stiffness each NR iteration (from Program Controlled setting)
keyo,cid,12,0              ! standard contact
mp,mu,cid,0.15      ! unitless
keyo,cid,2,0               ! augmented Lagrange (from Program Controlled setting)
keyo,cid,4,0               ! on Gauss point (from Program Controlled setting)
keyo,cid,9,0               ! use real geometry with stepped effects
keyo,cid,7,0               ! No Prediction
rmod,tid,3,1.       ! FKN
rmod,tid,5,0.       ! ICONT
rmod,tid,6,0.       ! PINB
rmod,tid,10,0.      ! CNOF
rmod,tid,12,0.      ! FKT
rmod,tid,36,75      ! WB DSID
rmod,cid,3,1.       ! FKN
rmod,cid,5,0.       ! ICONT
rmod,cid,6,0.       ! PINB
rmod,cid,10,0.      ! CNOF
rmod,cid,12,0.      ! FKT
rmod,cid,36,75      ! WB DSID
/com,*********** Create Contact "Frictional - HW6_obj\Solid To HW6_obj\Solid" ***********
*set,tid,13
*set,cid,12
r,tid
r,cid
et,tid,170
et,cid,174
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eblock,10,,,56
(15i9)
     9693       13       12       13        0     3831     3823     3825     3825    10922    10887     3825    10923
     9694       13       12       13        0     3831     3827     3823     3823    10925    10895     3823    10922
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-1
keyo,cid,8,2               ! auto create asymmetric contact (from Program Controlled setting)
keyo,cid,10,0              ! adjust contact stiffness each NR iteration (from Program Controlled setting)
keyo,cid,12,0              ! standard contact
mp,mu,cid,0.15      ! unitless
keyo,cid,2,0               ! augmented Lagrange (from Program Controlled setting)
keyo,cid,4,0               ! on Gauss point (from Program Controlled setting)
keyo,cid,9,0               ! use real geometry with stepped effects
keyo,cid,7,0               ! No Prediction
rmod,tid,3,1.       ! FKN
rmod,tid,5,0.       ! ICONT
rmod,tid,6,0.       ! PINB
rmod,tid,10,0.      ! CNOF
rmod,tid,12,0.      ! FKT
rmod,tid,36,78      ! WB DSID
rmod,cid,3,1.       ! FKN
rmod,cid,5,0.       ! ICONT
rmod,cid,6,0.       ! PINB
rmod,cid,10,0.      ! CNOF
rmod,cid,12,0.      ! FKT
rmod,cid,36,78      ! WB DSID
nsel,all
esel,all
/com,*********** Fixed Supports ***********
CMBLOCK,_FIXEDSU,NODE,      326
(8i10)
       746       747       748       749       750       751       752       753
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cmsel,s,_FIXEDSU
d,all,all
nsel,all
/com,******* Constant Zero Displacement Y *******
CMBLOCK,_DISPZEROUY,NODE,      784
(8i10)
        61        62        63        64        65        66        67        68
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
cmsel,s,_DISPZEROUY
d,all,uy,0
nsel,all
/com,******* Constant Zero Displacement Z *******
CMBLOCK,_DISPZEROUZ,NODE,      784
(8i10)
        61        62        63        64        65        66        67        68
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
cmsel,s,_DISPZEROUZ
d,all,uz,0
nsel,all
tblist
fini
/com,****************************************************************************
/com,*************************    SOLUTION       ********************************
/com,****************************************************************************
/solu
antype,0                   ! static analysis
nlgeom,on                  ! Turn on Large Deformation Effects
_thickRatio=  1     ! Ratio of thick parts in the model
eqsl,sparse,,,,,1
cntr,print,1               ! print out contact info and also make no initial contact an error
nldiag,cont,iter           ! print out contact info each equilibrium iteration
rescontrol,define,last,last,,dele	   ! Program Controlled
/com,****************************************************
/com,******************* SOLVE FOR LS 1 OF 1 ****************
/com,*** Set Displacements ***
CMBLOCK,_CM60UX_XP,NODE,      392
(8i10)
      1397      1398      1399      1400      1401      1402      1403      1404
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
cmsel,s,_CM60UX_XP
d,all,ux,-1.e-003
CMBLOCK,_CM62UX_XP,NODE,      392
(8i10)
        61        62        63        64        65        66        67        68
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
cmsel,s,_CM62UX_XP
d,all,ux,-1.e-003
nsel,all

/com,*** Component For All Non-Zero UX Displacements ***
cmsel,s,_CM60ux_xp
cmsel,a,_CM62ux_xp
cm,_DISPNONZEROUX,NODE
nsel,all

autots,on                   ! User turned on automatic time stepping
nsub,10,1000,10,OFF
time,1.
outres,erase
outres,all,none
outres,nsol,all,
outres,rsol,all
outres,eangl,all
outres,etmp,all
outres,veng,all
outres,strs,all,
outres,epel,all,
outres,eppl,all,
outres,cont,all,
outres,nldat,all,
! *********** WB SOLVE COMMAND ***********
! check interactive state
*get,ANSINTER_,active,,int
*if,ANSINTER_,ne,0,then
/eof
*endif
solve
/com *************** Write FE CONNECTORS *********
CEWRITE,file,ce,,INTE
/com,****************************************************
/com,*************** FINISHED SOLVE FOR LS 1 *************
*get,_NSOLTHREADS,active,0,ntfs
*get,_NSOLPROCESSES,active,0,npfs
/post1
fini
